OpenVSP model (file version 5), 1 components.
Geometry view with OpenVSP parameter names; values to 6 digits, angles in degrees, lengths in the model's unit.
Overall bounding box: X_Min=0 X_Len=117 Y_Min=-5 Y_Len=10 Z_Min=-3.629 Z_Len=10.3805

Fuselage "FuselageGeom"
  location (X Y Z) 0 0 0, rotation 0 0 0
  bounding box size 117 10 10.3805
  Design: Length=117
  cross sections:
    n   XLocPercent  YLocPercent  YRotate  ZLocPercent  shape
    0   0            0            0        0            ellipse Ellipse_Height=1 Ellipse_Width=2
    1   0.0286325    0            0        0.0032       ellipse Ellipse_Height=5.8 Ellipse_Width=6.3
    2   0.057265     0            0        0.0087       ellipse Ellipse_Height=8.3 Ellipse_Width=8
    3   0.159        0            0        0.013        ellipse Ellipse_Height=10.3 Ellipse_Width=10
    4   0.3          0            0        0.013        as above
    5   0.413        0            0        0.013        as above
    6   0.5444       0            0        0.013        as above
    7   0.6964       0            0        0.014        ellipse Ellipse_Height=10 Ellipse_Width=10
    8   0.815        0            -6.9     0.0196581    ellipse Ellipse_Height=8.9 Ellipse_Width=9
    9   0.85         0            -6       0.0226496    ellipse Ellipse_Height=8.2 Ellipse_Width=8.3
    10  0.895        0            -5.5     0.0254701    ellipse Ellipse_Height=6.25 Ellipse_Width=6.35
    11  0.984375     0            0        0.035        ellipse Ellipse_Height=2 Ellipse_Width=3.5
    12  1            0            0        0.035        ellipse Ellipse_Height=0.3 Ellipse_Width=0.4
